*HEADING
cantilever, 12x2x2 C3D8I, modes
*NODE
1, 0.000000, 0.000000, 0.000000
2, 0.500000, 0.000000, 0.000000
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*ELEMENT, TYPE=C3D8I, ELSET=E
1, 1, 2, 15, 14, 40, 41, 54, 53
2, 2, 3, 16, 15, 41, 42, 55, 54
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*MATERIAL, NAME=STEEL
*ELASTIC
210000., 0.3
*DENSITY
7.8e-9
*SOLID SECTION, ELSET=E, MATERIAL=STEEL
*NSET, NSET=FIX
1, 14, 27, 40, 53, 66, 79, 92, 105
*NSET, NSET=TIP
13, 26, 39, 52, 65, 78, 91, 104, 117
*BOUNDARY
FIX, 1, 3
*STEP
*FREQUENCY
4
*NODE FILE
U
*END STEP
